Fmax := [360160; 383784; 395395; 403003; 408608]
Vvar := [-1; -3.25; -5.5; -7.75; -10]
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Lk := 10^-3
Ck := 10^-10
pi := 3.14
Fr := Fmax
Cd := -(Ck*Lk - 1/(4*Fr^2*pi^2))/Lk
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M := 0.33
Cj0 := 130*10^-12
Vj0 := 0.71
Cd = [9.54743e-11; 7.215e-11; 6.21879e-11; 5.6122e-11; 5.18682e-11]
Vvar = [-1; -3.25; -5.5; -7.75; -10]
Given
5.187*10^-11 == Cj0*(1 - (-10/Vj0))^(-M)
5.612*10^-11 == Cj0*(1 - (-7.75/Vj0))^(-M)
6.219*10^-11 == Cj0*(1 - (-5.5/Vj0))^(-M)
7.215*10^-11 == Cj0*(1 - (-3.25/Vj0))^(-M)
Diod_P := Minerr(Cj0, Vj0, M)
Diod_P = [1.23911e-10; 0.819416; 0.337453]
# Полученные параметры
Cj1 := 1.239*10^-10
Vj1 := 0.819
M1 := 0.337
Cd1(U) := Cj1*(1 - U/Vj1)^(-M1)
# Параметры из библиотеки
Cj0 = 1.3e-10
Vj0 = 0.71
M = 0.33
Cdmain(U) := Cj0*(1 - U/Vj0)^(-M)
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