Uk := 10
Ek := 20
Ub := 1
Ik := 25*10^-3
BF := 107.679
Ib := Ik/BF = 0.000232172
Rk := ((Ek - Uk)/Ik) = 400
Id := Ib*10 = 0.00232172
R1 := 1
R2 := 1
Given
R1/R2 == (Ek - Ub)/Ub
R1 + R2 == Ek/Id
res := Minerr(R1, R2) = [8183.6; 430.716]
